# AguaClara Water Treatment Plants
# Automated Design
# Add variable descriptions next to every varible so it is easy to interpret what this all means.
# Design References
# [reference: BasicInputs.xmcd]
# Use BasicClientInputs and ExpertClientInputs when this is run by LabVIEW.
# Use BasicInputs and ExpertInputs to use the program in MathCAD
# Change the reference by
# - right clicking
# - select properties
# - reference tab
# - type in the correct file name
# [reference: ExpertInputs.xmcd]
# [reference: DesignAssumptions.xmcd]
# [reference: MathFunctions.xmcd]
# [reference: PipeDatabase.xmcd]
# [reference: MinorLossCoefficients.xmcd]
# [reference: FluidsFunctions.xmcd]
# [reference: Sedimentation Tank.xmcd]
# [reference: Floc Hopper.xmcd]
# [reference: FCM.xmcd]
# [reference: Flocculator 3.xmcd]
# [reference: RapidMixer.xmcd]
# [reference: Materials List.xmcd]
# [reference: EntranceTankDim.xmcd]
Q_Plant = 70 L/s
# Sed Tanks and Slopes:
B_SedPort = 3.68418 cm  # Height of the narrowest part of the manifold ports
N_SedTanks = 3
W_SedPort = 3.68418 cm
H_SedBetween = 0 cm  # Distance from the top of the inlet manifold to the bottom of the ledge supporting the lamella frame
A_SedPort = 13.5732 cm^2  # Port Area
L_Sed = 10.4348 m
W_SedSludgeFlat = 5 cm  # Distance between tips of manifold plates (space alloted for the drain holes
N_SedBays = 3  # Number of bays of inlet manifolds in each sed tank
AN_SedTopInlet = 60 deg  # Angle of the top of the inlet manifold
L_SedPort = 4.25412 cm  # Length of the port through which water exits the inlet manifold
AN_SedBottom = 10 deg  # Angle of the bottom of inlet manifold
W_SedSlopePlate = 30 cm  # Width of ferrous cement plates in whice one manifold port is cut
Q_SedBay = 7.77778 L/s
W_SedBayActual = 0.82 m
L_SedSlopeManifold = 0.700718 m  # This is the extra distance between the last slope and the wall
# Sedimentation Tank Sludge Drain:
N_SedSludgeOrifices = 69  # per cell
Ti_SludgeDrain = 30 min  # Tank Drain time
W_SedSludge = 15.6613 cm  # Width of the sludge channel
B_SedSludgeOrifices = 15 cm  # Distance center to center between drain orifices
H_SedSludge = 7.83064 cm  # Depth of the sludge channel
T_SedSludge = 7.4641 cm
T_SedSludge = 7.4641 cm
# Thickness of the plate topping the sludge channel
# through which drain holes are formed
W_SedDrainCover = 19.2376 cm
D_SedSludgeOrifice = 0.012 m  # Diameter of drain orifices
W_SedInletBottom = 0.313812 m
N_SedSludgeOrifices = 69
ND_SedSludgeValve = 4 in
# Sedimentation Tank Dimensions:
Z_SedSludge = 0.152947 m  # Height from 0 of the top of the sludge drain
H_SedBottomSlope = 0.0586247 m  # Height of the bottom slope
H_SedTopSlope = 0.60684 m  # Height of the top of the inlet manifold
Z_SedSlopes = 0.759787 m  # Height from 0 of the top of the inlet manifold
W_Sed = 2.76 m  # Total tank wall height
L_Sed = 10.4348 m  # Total tank length
# Inlet Channel:
HW_InletChannel = 0.617653 m  # Width of the drop chimneys connecting channel to sed inlet manifolds
W_InletChannel = 0.617653 m  # length of drop chimmneys
L_Channel = 8.88 m
W_SedManifoldEntrance = 0.2632 m
L_SedManifoldEntrance = 0.161412 m
H_SedManifoldPort = 0.340078 m  # Ports at bottom of inlet chimney are set to be triangles
W_SedManifoldPort = 0.248759 m
N_SedInletPipes = 2  # per sed bay
H_InletChannel = 0.717653 m
# Sedimentation Tank Effluent Launder:
N_SedLaunderOrifices = 180  # Number of orifices per launder
Q_SedLaunderOrifices = 2.16049e-5 m^3/s  # More Launder Dimensions
ND_SedLaunder = 6 in
B_SedLaunderOrifices = 0.1 m  # Center to center launder spacing
L_SedLaunder = 9.19785 m
# Exit Channel:
D_SedLaunderOrifice = 0.275591 in
W_ExitChannel = 0.469284 m
H_ExitChannel = 0.717653 m
L_ExitChannel = 8.88 m
H_PltWeir = 0.480157 m  # height of the weir carrying water to the distribution tank
HW_ExitChannel = 0.577653 m  # water height in exit channel from 0
# Lamella:
L_SedPlate = 0.36576 m
B_SedPlate = 2.14624 cm  # center to center distance between lamella
S_SedPlate = 1.7 cm  # spacing between lamella
N_SedPlates = 359  # Number of Sed Plates per Sedimentation Tank Bay.
AN_SedPlate = 60 deg
ZW_ExitChannel = 1.41134 m
V_SedC = 9.29012 m/day
L_SedActive = 7.62135 m
T
V_SedUp = 70 m/day
Z_SedLaunder = 1.3272 m
H_SedPlate = 0.316757 m
H_SedAbove = 0.208275 m  # Height of water needed above the lamella
N_SedPlates = 359
HW_Sed = 1.45134 m
H_Sed = 1.55134 m
Z_Mp = 0.833686 m
N_SedPorts = 32
H_SedBayDivider = 0.829787 m
W_SedSlopePlateRemaining = 0.834783 m
W_SedBayDivider = 0.15 m
# Sedimentation Tank Floc Hopper:
A_FlocHopper = 2.4192 m^2
L_FlocHopper = 2.95024 m  # Length of the hopper cement plate
L_FlocHopperOffset = 0.18288 m  # distance from the edge of the channel to the bottom of the first lamella (collection distance)
W_FlocHopper = 0.82 m  # width of the hopper set within each bay
# Flow Controller:
N_Fcm = 8
ID_FcmTube = 4.318 mm
ID_FcmTube = 0.17 in
L_FcmTube = 245.295 cm
Q_FcmTubeMax = 393.75 mL/min
HL_FcmValve = 28.8045 cm
# Flocculator: | Look at Flocculator Positioning arrays
W_FlocChannel = 1.75466 m
# Fill last channel with bafffles from last channel
# Fix port width to be based on energy dissipation in that channel
ED_Floc = [20; 2] mW/kg
# Adjust spacing after the number of baffles per channel is known.
# Check the residence time of the flocculator should be at least 20minutes
HW_FlocEnd = 1.45134 m
X_FlocBaffles = [
    0.22187, 0.22187, 0.541932, 0.576164;
    0.483739, 0.483739, 1.12386, 1.19233;
    0.745609, 0.745609, 1.7058, 1.80849;
    1.00748, 1.00748, 2.28773, 2.42465;
    1.26935, 1.26935, 2.86966, 3.04082;
    1.53122, 1.53122, 3.45159, 3.65698;
    1.79309, 1.79309, 4.03353, 4.27315;
    2.05496, 2.05496, 4.61546, 4.88931;
    2.31683, 2.31683, 5.19739, 5.50547;
    2.5787, 2.5787, 5.77932, 6.12164
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] m
L_FlocBaffles = [
    1.83638, 1.83638, 1.51632, 1.48209;
    1.22947, 1.22947, 0.909407, 0.875176;
    1.83638, 1.83638, 1.51632, 1.48209;
    1.22947, 1.22947, 0.909407, 0.875176;
    1.83638, 1.83638, 1.51632, 1.48209;
    1.22947, 1.22947, 0.909407, 0.875176;
    1.83638, 1.83638, 1.51632, 1.48209;
    1.22947, 1.22947, 0.909407, 0.875176;
    1.83638, 1.83638, 1.51632, 1.48209;
    1.22947, 1.22947, 0.909407, 0.875176
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] m
Z_FlocBaffles = [
    0, 0, 0, 0;
    0.22187, 0.22187, 0.541932, 0.576164;
    0, 0, 0, 0;
    0.22187, 0.22187, 0.541932, 0.576164;
    0, 0, 0, 0;
    0.22187, 0.22187, 0.541932, 0.576164;
    0, 0, 0, 0;
    0.22187, 0.22187, 0.541932, 0.576164;
    0, 0, 0, 0;
    0.22187, 0.22187, 0.541932, 0.576164
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] m
N_FlocChannels = 4
L_FlocTank = 41.7391 m
HL_Floc = 50.6912 cm
HW_FlocStart = 1.95825 m
S_FlocBaffle = [22.187; 22.187; 54.1932; 57.6164] cm
B_FlocBaffle = [26.187; 26.187; 58.1932; 61.6164] cm
N_FlocChannelBaffles = [39; 39; 17; 16]
W_FlocPort = [0.17187; 0.17187; 0.491932; 0.526164] m
HL_FlocChannels = [21.6356; 21.6356; 3.95489; 3.46519] cm
L_FlocBaffleLower = [1.22947; 1.22947; 0.909407; 0.875176] m
L_FlocBaffleUpper = [1.83638; 1.83638; 1.51632; 1.48209] m
H_FlocPort = [2.26512; 2.26512; 1.933; 1.9214] m
Ti_Floc = 25.3078 min  # residence time of the flocculator
N_FlocBaffles = 111
# Rapid Mix Unit and Entrance Tank:
L_Et = 2.93939 m
W_Et = 2.93939 m
H_Et = 2.35825 m  # Height of Entrance Tank Orifice
W_EtOrifice[30] = 0.031 m
L_trueET[30] = 1.7434 m  # Length of Entrance Tank Orifice
Pi_EtFlow[30] =  # error: This value must be a vector.  # Ratio of the minimum flow divided by the maximum flow through the plant.
L_FlocEntryOrifice = 175.466 cm  # Length of orifice entering into flocculator from Rapid Mix Unit
W_FlocEntryOrifice = 3.92511 cm  # Height of orifice entering into flocculator
ED_Diffusion =  # error: This variable is undefined.  # Minimum Energy Dissipation needed
HL_FlocEntryOrifice = 7.86025 cm  # Head loss caused by entering flocculation tank.
A_FlocEntry = 0.0688721 m^2
A_EtOrifice = [
    560.306; 559.608; 558.914; 558.221; 557.532; 556.845; 556.16; 555.478; 554.799; 554.122
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] cm^2
HW_EtTotal =  # error  # Total Height of water at beginning of rapid mix unit
HW_Channel2 =  # error  # Height of water at the back of the entrance tank channel (from channel bottom)
HW_EtChannel = 14.0736 cm  # Height of Waterfall into flocculator
W_EtChannel = 22.187 cm  # Widt of entrance tank channel
Vol_Stock = 5670 L  # Volume of chemical stock tanks
ZW_ExitChannel = 1.41134 m  # Water Level at the end of the plant in the exit channel and exit channel box
HW_Sed = 1.45134 m
HW_FlocStart = 1.95825 m  # Water level at the beginning of the floc tank
HL_Floc = 50.6912 cm  # just for ref. the head loss throught the floc tank
HW_EtTotal =  # error  # Height of the water in the entrance channel
# Materials List:
L_LaunderPipe =  # error
N_Launders = 18
L_LaunderPipeTotal = 165.561 m
N_Valves = 9
N_LaunderCouplings = 18
N_ValveCouplings = 9
N_SedPlatesTotal = 3231
N_SedPlatesPerSheet = 10
N_SedPlateSheets = 324
N_PipeSedPlateStand =  # error
A_SedTank = 95.3249 m^2
# [reference: AutoCADMasterProgram.xmcd]
# AutoCAD References
AC_SedTank = [
    "_-view o t"; "-layer m tank"; "c t 132,132,132"; "tank"; "  "; "_-view o t _zoom w 0.16,-0.16,0 -10.59478,2.92,1.55134 _box 0,0,0 -10.43478,2.76,1.55134 _box 0.15,-0.15,-0.15 -10.58478,2.91,1.55134 _subtract 0.15,-0.15,-0.15  0,0,0 "; "-layer s 0"; "  "; "-layer f tank"; "  "
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]
AC_EntranceTank = [
    "-layer m entrancetank";
    "c t 214,214,214";
    "entrancetank";
    "  ";
    "_-view o t _zoom w 0.16,16.18862,0 -3.09939,19.44801,2.35825 _box 0,16.34862,0 -2.93939,19.28801,2.35825 _box 0.15,16.19862,-0.15 -3.08939,19.43801,2.35825 _subtract 0.15,16.19862,-0.15  0,16.34862,0 ";
    "-layer s 0";
    "  ";
    "-layer f entrancetank";
    "  ";
    "-layer s entrancetank";
    "  ";
    "_box -2.93939,16.19862,2.30825 -2.71752,16.34862,2.35825";
    "-layer s 0";
    "  ";
    "-layer t entrancetank";
    "  ";
    "_-view o t";
    "_subtract 0.15,16.34862,0  -2.93939,16.19862,2.30825 ";
    "-layer f entrancetank";
    "  "
]
AC_FlocTank = [
    "-layer m floctank"; "c t 91,91,91"; "floctank"; "  "; "_-view o t _zoom w 0.16,8.57,0 -10.59478,16.35862,2.05825 _box 0,8.73,0 -10.43478,16.19862,2.05825 _box 0.15,8.58,-0.15 -10.58478,16.34862,2.05825 _subtract 0.15,8.58,-0.15  0,8.73,0 "; "-layer s 0"; "  "; "-layer f floctank"; "  "; "-layer m floctankwall"
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]
